*Heading
** Job name: Job-1 Model name: Model-1
** Generated by: Abaqus/CAE 2019
*Preprint, echo=NO, model=NO, history=NO, contact=NO
**
** PARTS
**
*Part, name=Part-1
*End Part
**
**
** ASSEMBLY
**
*Assembly, name=Assembly
**
*Instance, name=Part-1-1, part=Part-1
*NODE
      1,           1.,           0.
      2,           1.,           1.
      3,           0.,           1.
      4,           0.,           0.
      5,          -1.,           0.
      6,          -1.,           1.
*ELEMENT, type=CPS4R
1, 1, 2, 3, 4
2, 4, 3, 6, 5
*End Instance
**
*End Assembly
**
** MATERIALS
**
*Material, name=dummy
*Elastic
1., 0.2
